*HEADING
Cantilever Beam with C3D4 Elements

** Node Definitions
*NODES

*Node
      1, 0.0399999991, 0.0399999991,           1.
      2, 0.0399999991,           0.,           1.
      3, 0.0399999991,           0.,           0.
      4, 0.0399999991, 0.0399999991,           0.
      5,           0.,           0.,           1.
      6,           0.,           0.,           0.
      7,           0., 0.0399999991,           0.
      8,           0., 0.0399999991,           1.
      9, 0.0399999991, 0.0199999996,           1.
     10, 0.0399999991,           0.,  0.899999976
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** Tetrahedral C3D4 Elements
*ELEMENT, TYPE=C3D4, ELSET=BEAM
1,  87,  67,  35,  91
  2,  45,  78,  87,  88
  3,  91,  36,  68,  67
  4,  69,  68,  59,  92
  5,  93,  51,  82,  72
  6,  56,  94,  75,  57
  7,  94,  86,  47,  76
  8,  66,  86,  76,  95
  9,  94,  13,  66,  14
 10,  94,  85,  86,  33
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** Material Properties
*MATERIAL, NAME=EL
*ELASTIC
4e6, 0.3
*NSET, NSET=DES
1

*DESIGNVARIABLES, TYPE=COORDINATE
DES

** Section Assignment
*SOLID SECTION, ELSET=BEAM, MATERIAL=EL
*Nset, nset=FIXED
1,2,5,8,9,29,42,52,81
*Nset, nset=LOADED
3,4,6,7
** Fix all nodes on the fixed end (x=0)
*BOUNDARY
FIXED, 1, 1
FIXED, 2, 2
FIXED, 3, 3

** Apply Load to all nodes at x=1
*STEP
*STATIC
*CLOAD
LOADED, 2, 100
*END STEP


*NODE FILE
 U
***EL FILE
** S, E
*END STEP


*STEP
*SENSITIVITY
*OBJECTIVE
STRAINENERGY
*END STEP
